f(x) := 2*cos(x) - x^4 + 2
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Df_1(x) := d/dx(f(x))
Df_2(x) := d^2/dx^2(f(x))
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m1 := |Df_1(1)|
m1 = 5.68294
m2 := |Df_2(1)|
m2 = 13.0806
M1 := |Df_1(1.5)|
M1 = 15.495
M2 := |Df_2(1.5)|
M2 = 27.1415
x0 := 1.5
xk := root(f(x0), x0)
xk = 1.26912
f(xk) = -2.93099e-14
imax := 10^3
BiSection(f, xa, xb, eps) :=
    i ← 0
    while (((xb - xa) > eps)*(i ≤ imax))
        i ← i + 1
        xc ← (xa + xb)/2
        xa ← xc if (f(xa)*f(xc) > 0)
        xb ← xc otherwise
    xk ← xa
    Z[0] ← i
    Z[1] ← xk
    Z[2] ← f(xk)
    return Z
xa := 1
xb := 1.5
eps := 10^-7
result := BiSection(f, xa, xb, eps)
result = [23; 1.26912; 3.259e-7]
